C := READRGB("1.bmp")
# [component: inputs C]
R := READ_RED("1.bmp")
G := READ_GREEN("1.bmp")
B := READ_BLUE("1.bmp")
M := READBIN("prim.txt", "byte")
M = [
    255; 254; 104; 0; 111; 0; 119; 0; 32; 0
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]
M = [
    255; 254; 104; 0; 111; 0; 119; 0; 32; 0
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]
Na := 256
K := "@J|eKc-I980"
Nk := strlen(K) = 11
Nm := rows(M) = 498
K1 :=
    K ← str2vec(K)
    for i ∈ 0 .. Nm - 1
        r ← mod(i, Nk)
        K1[i] ← K[1]
    K1
M_cod :=
    for j ∈ 0 .. Nm - 1
        M_cod[j] ← mod(M[j] + K1[j], Na)
    M_cod
m_start := "n0G@m0k"
m_end := "KiHeu,6"
sMe := stack(str2vec(m_start), M_cod, str2vec(m_end))
rows(sMe) = 512
8*rows(sMe) = 4096
3*rows(C)*cols(C) = 589824
B2D(x) := sum(x[i]*2^i, i = 0 .. 7)
D2B(x) :=
    for i ∈ 0 .. 7
        V[i] ← mod(x, 2)
        x ← floor(x/2)
    V
Cv :=
    C1 ← augment(B, G, R)
    Cv ← C1[:, 0]
    for i ∈ 1 .. cols(C1) - 1
        Cv ← stack(Cv, C1[:, i])
Sv :=
    for m ∈ 0 .. rows(sMe) - 1
        b ← D2B(sMe[m])
        for i ∈ 0 .. 7
            P ← D2B(Cv[i + 8*m])
            P[0] ← b[i]
            Sv[i + 8*m] ← B2D(P)
    for j ∈ rows(Sv) .. rows(Cv) - 1
        P ← D2B(Cv[j])
        P[0] ← round(rnd(1))
        Sv[j] ← B2D(P)
    Sv
S1 :=
    for i ∈ 0 .. cols(C) - 1
        S1[:, i] ← submatrix(Sv, i*rows(C), (i + 1)*rows(C) - 1, 0, 0)
B_M := submatrix(S1, 0, rows(C) - 1, 0, cols(C)/3 - 1)
G_M := submatrix(S1, 0, rows(C) - 1, cols(C)/3, 2*cols(C)/3 - 1)
R_M := submatrix(S1, 0, rows(C) - 1, 2*cols(C)/3, cols(C) - 1)
S := augment(R_M, G_M, B_M)
# [component: inputs S]
# [component: inputs R_M]
# [component: inputs G_M]
# [component: inputs B_M]
WRITERGB("1.bmp") := S
R1 := READ_RED("1.bmp")
G1 := READ_GREEN("1.bmp")
B1 := READ_BLUE("1.bmp")
# [component: inputs S]
Sv1 :=
    S1 ← augment(B1, G1, R1)
    Sv1 ← S1[:, 0]
    for i ∈ 1 .. cols(S1) - 1
        Sv1 ← stack(Sv1, S1[:, i])
Mf :=
    for m ∈ 0 .. rows(Sv1)/8 - 1
        for i ∈ 0 .. 7
            P ← D2B(Sv1[i + 8*m])
            b[i] ← P[0]
        Mf[m] ← B2D(b)
        Mf[m] ← Mf[m] + 32.5 if Mf[m] < 32
    Mf
N :=
    for s ∈ 0 .. 31
        i ← 0
        for m ∈ 0 .. rows(Mf) - 1
            if Mf[m] == s + 32.5
                N[i, s] ← m
                i ← i + 1
    N
# [component: inputs N]
m1_start := "n0G@m0k"
m1_end := "KiHeu,6"
M_cod1 :=
    s ← 0
    e ← 0
    bs ← strlen(m1_start)
    be ← strlen(m1_end)
    Mf ← vec2str(Mf)
    for m ∈ 0 .. strlen(Mf) - 1
        s ← m + bs if substr(Mf, m, bs) == m1_start and s == 0
        e ← m - 1 if substr(Mf, m, be) == m1_end and e == 0
        break if s ≠ 0 and e ≠ 0
    Mf ← substr(Mf, s, e - s + 1)
    M_cod1 ← str2vec(Mf)
    for n ∈ 0 .. cols(N) - 1
        for i ∈ 0 .. rows(N) - 1
            break if N[i, n] == 0 or N[i, n] > e
            M_cod1[N[i, n] - bs] ← n if s < N[i, n] ≤ e
    M_cod1
K11 :=
    K ← str2vec(K)
    for i ∈ 0 .. Nm - 1
        r ← mod(i, Nk)
        K1[i] ← K[r]
    K1
M1 :=
    for j ∈ 0 .. Nm - 1
        M[j] ← mod(Na + M_cod1[j] - K11[j], Na)
    M
WRITEBIN("M_dec.txt", "byte", 0) := M1
